@DSL ImplicitII;
@Behaviour Affine_formulation;
@Author Martin Antoine;
@Date 24 / 01 / 26;
@Description{"Affine formulation for homogenization of a viscoplastic polycrystal, Masson et al. 2001.", based on self-consistent scheme};
@UseQt false;
@Algorithm NewtonRaphson_NumericalJacobian;
@PerturbationValueForNumericalJacobianComputation 1e-10;
@Epsilon 1e-14;

@TFELLibraries {"Material"};
@Includes{
#include "TFEL/Material/IsotropicModuli.hxx"
#include "TFEL/Material/IsotropicEshelbyTensor.hxx"
#include "TFEL/Material/AnisotropicEshelbyTensor.hxx"
#include "TFEL/Material/MicrostructureDescription.hxx"
#include "TFEL/Material/MicrostructureLinearHomogenization.hxx"
#include "TFEL/Material/ExtendedPolyCrystalsSlidingSystems.hxx"}

//! number of phases
@IntegerConstant Np = 10;

//! normalization strainrate
@Parameter real gamma0 = 1.0;
@Parameter real k0 = 1.;
@Parameter real mu0 = 1.;

@ModellingHypothesis Tridimensional;
@OrthotropicBehaviour;
@CrystalStructure HCP;
@SlidingSystems{<1, 1, -2, 0>{1, -1, 0, 0},
                <-2, 1, 1, 3>{1, -1, 0, 1},
                <-2, 1, 1, 0>{0, 0, 0, 1},
                <1, 1, -2, 0>{1, -1, 0, 1}};

@MaterialProperty real nexp;
@MaterialProperty real tau1;
@MaterialProperty real tau2;
@MaterialProperty real kap;

@StateVariable Stensor sigma[Np];
sigma.setEntryName("PhaseReferenceStress");

@AuxiliaryStateVariable real ne;

@LocalVariable Stensor4 I;
@LocalVariable real frac[Np];
@LocalVariable real tau0[Np];
@LocalVariable Stensor4 M[Np];
@LocalVariable Stensor4 L[Np];
@LocalVariable tmatrix<6*Np,6,real> A;
@LocalVariable tmatrix<6*Np,6,real> dsigma_deto;

@InitLocalVariables{
I=tfel::math::st2tost2<3u,real>::Id();
for (int r=0;r<Np;r++){
if (r<5){tau0[r]=tau1;}
else{tau0[r]=tau2;}
}

}

@Integrator {
ne=nexp;
using PolyCrystalsSlidingSystems =
	ExtendedPolyCrystalsSlidingSystems<Np, Affine_formulationSlipSystems<real>, real>;
const auto& gs =
	PolyCrystalsSlidingSystems::getPolyCrystalsSlidingSystems("polycrystal.csv");

//tangent modulus and polarization/////////////////////////////////
using namespace tfel::math;
Stensor4 LSC;
Stensor e[Np];
Stensor dpsi_dsigma[Np];

for (int r=0;r<Np;r++){
  M[r]=Stensor4::zero();
 dpsi_dsigma[r]=Stensor::zero();
 frac[r]=gs.volume_fractions[r];
 for (int k=0;k<Nss;k++){
  const auto Nkr = gs.mus[r][k]^gs.mus[r][k];
  const auto taukr = gs.mus[r][k] | (sigma[r]+dsigma[r]);
  const auto puisn_1 = pow(abs(taukr)/tau0[r], nexp-1);
  const auto fac= nexp*gamma0/tau0[r]*puisn_1;
  M[r]+=fac*Nkr;
  const auto puisn = puisn_1*abs(taukr)/tau0[r];
  const auto sgn= taukr< 0 ? -real(1) : real(1);
  dpsi_dsigma[r]+=sgn*gamma0*puisn*gs.mus[r][k];
 }
 e[r]=dpsi_dsigma[r]-M[r]*(sigma[r]+dsigma[r]);
 M[r]=M[r]+kap*I;
 L[r]=invert(M[r]);
}

//Self-consistent scheme///////////////////////
using namespace tfel::material::homogenization::elasticity;
const auto IM0=tfel::material::KGModuli<stress>(k0,mu0);
auto micro=ParticulateMicrostructure<3u,stress>(IM0);
const auto sphere=Sphere<length>();
std::vector<Stensor> polarisations;
const auto zero = Stensor::zero();
polarisations.resize(Np+1, zero);

for (int r=0 ; r<Np; r++){
  auto distribution = SphereDistribution<stress>(sphere,frac[r],L[r]);
  micro.addInclusionPhase(distribution);
  polarisations[r+1]=-L[r]*e[r];
}
const auto hmSC=computeSelfConsistent<3u,stress>(micro,1e-6,true,0,polarisations);
LSC = hmSC.homogenized_stiffness;
const auto tauSC = hmSC.effective_polarisation;
const auto A_SC=hmSC.mean_strain_localisation_tensors;

auto KGSC = computeKGModuli(LSC);
const auto PSC = computeSphereHillPolarisationTensor<stress>(KGSC);
const auto MSC_star = invert(invert(PSC)- LSC);

//residues/////////////////////////////////////
for (int r=0;r<Np;r++){
  const Stensor4 Ar=A_SC[r+1];
  map_derivative<Stensor,Stensor>(A,6*r,0)=Ar;
  fsigma[r] = M[r]*(sigma[r]+dsigma[r])-Ar*(eto+deto);
  fsigma[r]-=M[r]*(invert(M[r]+MSC_star))*(MSC_star*tauSC - e[r]);
}

//macroscopic stress//////////////////////////////////////
sig=LSC*(eto+deto)+tauSC;

}

@TangentOperator{
if (smt){
tmatrix<6*Np,6*Np,real> iJ = jacobian;
TinyMatrixInvert<6*Np,real>::exe(iJ);
dsigma_deto=iJ*A;
Dt=Stensor4::zero();
for (int r=0;r<Np;r++){
   const auto dsigmar_deto = map_derivative<Stensor,Stensor>(dsigma_deto,6*r,0);
   Dt+=frac[r]*dsigmar_deto;
}
}
}
