@ModellingHypothesis 'Tridimensional';
@Behaviour<@interface@> @library@ @behaviour@;
@ExternalStateVariable 'Temperature' {0 : 1000,1:1000};

@MaterialProperty<function> 'nexp' "1+0.9*(exp(2.4*t)-1)";
@MaterialProperty<constant> 'tau1' 10.;
@MaterialProperty<constant> 'tau2' 50.;

@MaterialProperty<function> 'kap' "0.001";
@MaterialProperty<function> 'r0' "1";

@ImposedStrain 'EXX' {0 : 1, 1 : 1};
@ImposedStrain 'EYY' {0 : -1, 1 : -1};
@ImposedStrain 'EZZ' {0 : 0, 1 : 0};
@ImposedStrain 'EXY' {0 : 0, 1 : 0};
@ImposedStrain 'EXZ' {0 : 0, 1 : 0};
@ImposedStrain 'EYZ' {0 : 0, 1 : 0};
@Times {0.,1 in 50};

@OutputFilePrecision 14;

@Test<file> @reference_file@ 'SXX' 8 1.e-3;
@Test<file> @reference_file@ 'SYY' 9 1.e-3;
@Test<file> @reference_file@ 'ne' 74 1e-5;
