@DSL IsotropicPlasticMisesFlow;
@Behaviour Plasticity;
@Author Helfer Thomas;
@Date 23 / 11 / 06;
@Epsilon 1e-14;
@UseQt true;

@MaterialProperty stress H;
@MaterialProperty stress s0;

@FlowRule {
  f = seq - H * p - s0;
  df_dseq = 1;
  df_dp = -H;
}
