@ModellingHypothesis 'Tridimensional';
@Behaviour<@interface@> @library@ @behaviour@;

@ExternalStateVariable 'Temperature' {0 : 1000,1:1000};

@MaterialProperty<constant> 'sig0'             1.e9;
@MaterialProperty<constant> 'n_'               0.05;
@MaterialProperty<constant> 'k_m'               1.e9;
@MaterialProperty<constant> 'kar'               1.e15;
@MaterialProperty<constant> 'mur'               1.e15;
@MaterialProperty<constant> 'fr'               0.25;

@ImposedStrain 'EXX' {0 : 0, 100 : 0.8660254};
@ImposedStrain 'EYY' {0 : 0, 100 : -0.8660254};
@ImposedStrain 'EZZ' {0 : 0, 100 : 0};
@ImposedStrain 'EXY' {0 : 0, 100 : 0};
@ImposedStrain 'EXZ' {0 : 0, 100 : 0};
@ImposedStrain 'EYZ' {0 : 0, 100 : 0};
@Times {0.,10 in 300};

@OutputFilePrecision 14;

@Test<file> @reference_file@ 'EXX' 2 1.e-14;
@Test<file> @reference_file@ 'EYY' 3 1.e-14;
@Test<file> @reference_file@ 'SXX' 8 1e-3;
@Test<file> @reference_file@ 'SYY' 9 1e-3;
