@ModellingHypothesis 'Tridimensional';
@Behaviour<@interface@> @library@ @behaviour@;
//@Behaviour<generic> 'src/libBehaviour.so' 'Sachs';

@MaterialProperty<constant> 'FirstPhaseYoungModulus'     60.e9;
@MaterialProperty<constant> 'FirstPhasePoissonRatio'       0.3;
@MaterialProperty<constant> 'FirstPhaseH'                4.e9;
@MaterialProperty<constant> 'FirstPhases0'               60.e6;
@MaterialProperty<constant> 'SecondPhaseYoungModulus'     50.e9;
@MaterialProperty<constant> 'SecondPhasePoissonRatio'       0.3;
@MaterialProperty<constant> 'SecondPhaseH'                2.e9;
@MaterialProperty<constant> 'SecondPhases0'               50.e6;
@MaterialProperty<constant> 'PhaseFraction' 0.5;
@ExternalStateVariable 'Temperature' 293.15;
@ImposedStrain 'EXX' {0 : 0, 1 : 5e-3};
@ImposedStress 'SYY' {0 : 0, 1 : 0};
@ImposedStress 'SZZ' {0 : 0, 1 : 0};
@ImposedStress 'SXY' {0 : 0, 1 : 0};
@ImposedStress 'SXZ' {0 : 0, 1 : 0};
@ImposedStress 'SYZ' {0 : 0, 1 : 0};
@Times {0.,1 in 200};

//@OutputFilePrecision 14;

@Test<file> @reference_file@ 'EXX' 2 1.e-14;
@Test<file> @reference_file@ 'SXX' 8 1e-3;
@Test<file> @reference_file@ 'SYY' 9 1e-3;
@Test<file> @reference_file@ 'SZZ' 10 1e-3;
@Test<file> @reference_file@ 'SXY' 11 1e-3;
@Test<file> @reference_file@ 'SXZ' 12 1e-3;
@Test<file> @reference_file@ 'SYZ' 13 1e-3;
