@DSL MaterialLaw;
@Law YoungModulus;

@Output E;

@Input TK;

@PhysicalBounds TK in [0:*[;
@Bounds TK in [293.13:973.15];

@Function {
  const auto TC = TK - 273.15 ;
  E = 127.8e9 * (1 - 7.825e-5 * (TC - 20.));
}
